log             log.ZIF8_closed append
units           real
atom_style      full
boundary        p p p

pair_style      lj/cut 12.500
bond_style      harmonic
angle_style     hybrid fourier cosine/periodic
dihedral_style  harmonic
improper_style  fourier

pair_modify     tail yes mix arithmetic
dielectric      1.0
special_bonds   lj/coul 0.0 0.0 1.0
box tilt        large
read_data       data.ZIF8_closed

#### Atom Groupings ####
group           fram     id   1:2208
#### END Atom Groupings ####

min_style       cg
print           "MinStep,CellMinStep,AtomMinStep,FinalStep,Energy,EDiff" file ZIF8_closed.min.csv screen no
variable        min_eval   equal 1.00e-06
variable        prev_E     equal 50000.00
variable        iter       loop 100000
label           loop_min
min_style       cg
fix             1 all box/relax aniso 0.0 vmax 0.01
minimize        1.0e-15 1.0e-15 10000 100000
unfix           1
min_style       fire
variable        tempstp    equal $(step)
variable        CellMinStep equal ${tempstp}
minimize        1.0e-15 1.0e-15 10000 100000
variable        AtomMinStep equal $(step)
variable        temppe     equal $(pe)
variable        min_E      equal abs(${prev_E}-${temppe})
print           "${iter},${CellMinStep},${AtomMinStep},${AtomMinStep},$(pe),${min_E}" append ZIF8_closed.min.csv screen no
if              "${min_E} < ${min_eval}" then "jump SELF break_min"
variable        prev_E     equal ${temppe}
next            iter
jump            SELF loop_min
label           break_min
write_data min_closed.data nocoeff
