units           real
atom_style      full
boundary        p p p
pair_style      lj/cut 12.500
bond_style      harmonic
angle_style     hybrid cosine/periodic fourier
dihedral_style  harmonic
improper_style  fourier
special_bonds   lj/coul 0.0 0.0 1.0
pair_modify     tail yes mix arithmetic
read_data       phi24.data
run             0
print           "RIGID_ENERGY $(pe)"
group           frozen id 1 2 5 6 7 8 11 12 13 14 20 21 22 28 29 30 33 34 35 36 39 40 41 42 48 49 50 56 57 58 61 62 63 64 70 71 72 73 76 77 78 79 85 86 87 89 90 95 96 98 99 104 105 110 111 112 114 115 116 121 122 123 128 129 131 132 133 135 136 141 142 144 145 146 152 153 154 157 158 159 165 166 167 173 174 175 181 182 183 186 187 188 191 192 193 196 197 198 201 202 203 209 210 211 214 215 216 222 223 225 226 231 232 234 235 240 241 246 247 252 253 255 256 261 262 267 268 270 271 273 274 276 277 278 281 282 283 284 287 288 289 290 296 297 298 304 305 306 309 310 311 312 315 316 317 318 324 325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
fix             hold frozen setforce 0.0 0.0 0.0
min_style       cg
minimize        1.0e-10 1.0e-10 5000 50000
print           "RELAXED_ENERGY $(pe)"
write_data      relaxed_phi24.data nocoeff
